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/batch
! ANSYS input file written by Workbench version 2022 R1
! File used for geometry attach: C:\Users\dcla189\OneDrive - The University of Auckland\2023 Sem2\344 Project\Plane_wing\344Lab2_dc_mt\344Lab2_files\dp0\Geom-1\DM\Geom-1.agdb
/title,344Lab2--Static Structural (C5)
/com,--- Data in consistent NMM units. See Solving Units in the help system for more information.
/units,MPA
/prep7
! Turn off shape checking because checks already performed inside WB mesher.
! See help system for more information.
SHPP,OFF,,NOWARN
etcon,set             ! allow ANSYS to choose best KEYOP's for 180x elements, resets any applicable keyopt to MAPDL defaults
/com,*********** Nodes for the whole assembly ***********
nblock,3,,6959
(1i9,3e20.9e3)
        1     6.469669914E+02    -1.303300859E+01    -5.000000000E+03
        2     7.000000000E+02    -3.500000000E+01    -5.000000000E+03
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-1
/com,*********** Elements for Body 1 "Spar" ***********
et,1,186
keyo,1,2,1          ! set full integration on SOLID186
eblock,19,solid,,704
(19i9)
        1        1        1        1        0        0        0        0       20        0        1      625      727      871      628      720      898      870      627
     3378     3589     3386     3376     3568     3897     3384     3383     3377     3590     3896     3382
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-1
/com,*********** Elements for Body 2 "Rib 1" ***********
et,2,281
keyo,2,1,0       ! bending and membrane stiffness
eblock,19,solid,,70
(19i9)
        2        2        2        2        0        0        0        0        8        0     2129     5028     4969     4971     4971     5521     5520     4971     5526
        2        2        2        2        0        0        0        0        8        0     2130     5022     5023     5457     5457     5618     5621     5457     5619
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-1
/com,*********** Elements for Body 3 "Rib 1" ***********
et,3,281
keyo,3,1,0       ! bending and membrane stiffness
eblock,19,solid,,77
(19i9)
        3        3        3        3        0        0        0        0        8        0     2199     5088     5029     5031     5031     5627     5626     5031     5632
        3        3        3        3        0        0        0        0        8        0     2200     5399     5427     5400     5400     6251     6253     5400     6249
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-1
/com,*********** Elements for Body 4 "Rib 1" ***********
et,4,281
keyo,4,1,0       ! bending and membrane stiffness
eblock,19,solid,,77
(19i9)
        4        4        4        4        0        0        0        0        8        0     2276     5148     5089     5091     5091     5736     5735     5091     5741
        4        4        4        4        0        0        0        0        8        0     2277     5357     5385     5358     5358     6192     6194     5358     6190
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-1
/com,*********** Elements for Body 5 "Rib 1" ***********
et,5,281
keyo,5,1,0       ! bending and membrane stiffness
eblock,19,solid,,77
(19i9)
        5        5        5        5        0        0        0        0        8        0     2353     5208     5149     5151     5151     5845     5844     5151     5850
        5        5        5        5        0        0        0        0        8        0     2354     5315     5343     5316     5316     6133     6135     5316     6131
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-1
/com,*********** Elements for Body 6 "Rib 1" ***********
et,6,281
keyo,6,1,0       ! bending and membrane stiffness
eblock,19,solid,,70
(19i9)
        6        6        6        6        0        0        0        0        8        0     2430     5268     5209     5211     5211     5954     5953     5211     5959
        6        6        6        6        0        0        0        0        8        0     2431     5262     5263     5297     5297     6051     6054     5297     6052
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-1
/com,*********** Send User Defined Coordinate System(s) ***********
csys,0
toffst,273.15,  ! Temperature offset from absolute zero
/com,*********** Set Reference Temperature ***********
tref,22.
/com,*********** Send Materials ***********
MP,EX,1,72000,	! tonne s^-2 mm^-1
MP,NUXY,1,0.33,

MP,EX,2,72000,	! tonne s^-2 mm^-1
MP,NUXY,2,0.33,

MP,EX,3,72000,	! tonne s^-2 mm^-1
MP,NUXY,3,0.33,

MP,EX,4,72000,	! tonne s^-2 mm^-1
MP,NUXY,4,0.33,

MP,EX,5,72000,	! tonne s^-2 mm^-1
MP,NUXY,5,0.33,

MP,EX,6,72000,	! tonne s^-2 mm^-1
MP,NUXY,6,0.33,

/com,*********** Send Sheet Properties ***********
sectype,2,shell
secdata,1.
secoff,mid

sectype,3,shell
secdata,1.
secoff,mid

sectype,4,shell
secdata,1.
secoff,mid

sectype,5,shell
secdata,1.
secoff,mid

sectype,6,shell
secdata,1.
secoff,mid

!************************* Model Summary ********************
!Spar,	AL_7075,	matid,	1
!Rib 1,	AL_7075,	matid,	2
!Rib 1,	AL_7075,	matid,	3
!Rib 1,	AL_7075,	matid,	4
!Rib 1,	AL_7075,	matid,	5
!Rib 1,	AL_7075,	matid,	6
!************************* End Model Summary ********************
/com,*********** Fixed Supports ***********
CMBLOCK,_FIXEDSU,NODE,      274
(8i10)
       868       870       893       894       895       896       897       898
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cmsel,s,_FIXEDSU
d,all,all
nsel,all
/com,*********** Define Force Using Surface Effect Elements ***********
local,12,0,0.,0.,0.,0.,0.,0.
csys,0
et,7,156
keyop,7,5,1         !  No orientation node
eblock,10,,,150
(15i9)
     2500        7        7        7       12     5028     4969     5521
     2501        7        7        7       12     5022     5023     5618
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-1
esel,s,type,,7
keyop,7,2,1                ! Apply load in local coordinate system
keyop,7,7,1                ! Use original area so load is constant in large deformation
esel,all
fini
/com,****************************************************************************
/com,*************************    SOLUTION       ********************************
/com,****************************************************************************
/solu
antype,0                   ! static analysis
_thickRatio=  0     ! Ratio of thick parts in the model
eqsl,sparse,,,,,1
cntr,print,1               ! print out contact info and also make no initial contact an error
dmpoption,emat,no             ! Don't combine emat file for DANSYS
dmpoption,esav,no             ! Don't combine esav file for DANSYS
nldiag,cont,iter           ! print out contact info each equilibrium iteration
rescontrol,,none                 ! Do not keep any restart files
/com,****************************************************
/com,******************* SOLVE FOR LS 1 OF 1 ****************
esel,s,type,,7
nsle
sfe,all,1,pres,1,1.81940614523798e-002
sfe,all,2,pres,1,0.121293743015865
sfe,all,3,pres,1,0.
nsel,all
esel,all
nsub,1,1,1
time,1.
outres,erase
outres,all,none
outres,nsol,all,
outres,rsol,all
outres,eangl,all
outres,etmp,all
outres,veng,all
outres,strs,all,
outres,epel,all,
outres,eppl,all,
outres,cont,all,
! *********** WB SOLVE COMMAND ***********
! check interactive state
*get,ANSINTER_,active,,int
*if,ANSINTER_,ne,0,then
/eof
*endif
solve
/com *************** Write FE CONNECTORS *********
CEWRITE,file,ce,,INTE
/com,****************************************************
/com,*************** FINISHED SOLVE FOR LS 1 *************
/post1
fini
