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/batch
! ANSYS input file written by Workbench version 2022 R1
! File used for geometry attach: C:\Users\dcla189\OneDrive - The University of Auckland\2023 Sem2\344 Project\Plane_wing\344Lab2_dc_mt\Structural\Structural_files\dp0\SYS\DM\SYS.agdb
/title,Structural--Static Structural (A5)
/com,--- Data in consistent MKS units. See Solving Units in the help system for more information.
/units,MKS
/prep7
! Turn off shape checking because checks already performed inside WB mesher.
! See help system for more information.
SHPP,OFF,,NOWARN
etcon,set             ! allow ANSYS to choose best KEYOP's for 180x elements, resets any applicable keyopt to MAPDL defaults
/com,*********** Nodes for the whole assembly ***********
nblock,3,,5084
(1i9,3e20.9e3)
        1     7.969557585E-02    -6.972459420E-03     3.749250000E+00
        2     3.380946094E-02    -7.250462296E-02     3.749250000E+00
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-1
/com,*********** Elements for Body 1 "Surface Body" ***********
et,1,181
keyo,1,1,0       ! bending and membrane stiffness
keyo,1,3,2
eblock,19,solid,,85
(19i9)
        1        1        1        1        0        0        0        0        4        0     6616     4616     4419     4426     4426
        1        1        1        1        0        0        0        0        4        0     6617     4420     4422     4423     4423
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-1
/com,*********** Elements for Body 2 "Solid" ***********
et,2,185
eblock,19,solid,,3963
(19i9)
        2        2        1        2        0        0        0        0        8        0        1      504     1166      641      641      645      645      645      645
        2        2        1        2        0        0        0        0        8        0        2      520      536      538      538      657      657      657      657
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-1
/com,*********** Elements for Body 3 "Surface Body" ***********
et,3,181
keyo,3,1,0       ! bending and membrane stiffness
keyo,3,3,2
eblock,19,solid,,61
(19i9)
        3        3        3        3        0        0        0        0        4        0     6701       47     4571       46       46
        3        3        3        3        0        0        0        0        4        0     6702     3339     4447     3343     3343
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-1
/com,*********** Elements for Body 4 "Surface Body" ***********
et,4,181
keyo,4,1,0       ! bending and membrane stiffness
keyo,4,3,2
eblock,19,solid,,59
(19i9)
        4        4        4        4        0        0        0        0        4        0     6762     4592     4473     1478     1478
        4        4        4        4        0        0        0        0        4        0     6763     1583     1582     4408     4408
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-1
/com,*********** Elements for Body 5 "Surface Body" ***********
et,5,181
keyo,5,1,0       ! bending and membrane stiffness
keyo,5,3,2
eblock,19,solid,,57
(19i9)
        5        5        5        5        0        0        0        0        4        0     6821     4378     4573     4379     4379
        5        5        5        5        0        0        0        0        4        0     6822     4508     4375     4372     4372
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-1
/com,*********** Elements for Body 6 "Surface Body" ***********
et,6,181
keyo,6,1,0       ! bending and membrane stiffness
keyo,6,3,2
eblock,19,solid,,109
(19i9)
        6        6        6        6        0        0        0        0        4        0     6878     1645     4579     4535     4535
        6        6        6        6        0        0        0        0        4        0     6879     4511     1352       79       79
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-1
/com,*********** Elements for Body 7 "Surface Body" ***********
et,7,181
keyo,7,1,0       ! bending and membrane stiffness
keyo,7,3,2
eblock,19,solid,,17
(19i9)
        7        7        7        7        0        0        0        0        4        0     6987     4516       31       32       32
        7        7        7        7        0        0        0        0        4        0     6988     4585     4584     4514     4514
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-1
/com,*********** Elements for Body 8 "Surface Body" ***********
et,8,181
keyo,8,1,0       ! bending and membrane stiffness
keyo,8,3,2
eblock,19,solid,,8
(19i9)
        8        8        8        8        0        0        0        0        4        0     7004       27       26     4517     4517
        8        8        8        8        0        0        0        0        4        0     7005       25     4518       26       26
        8        8        8        8        0        0        0        0        4        0     7006       30     4586     4518     4518
        8        8        8        8        0        0        0        0        4        0     7007       29     4586       30       30
        8        8        8        8        0        0        0        0        4        0     7008       30     4518       25       25
        8        8        8        8        0        0        0        0        4        0     7009       27     4517       28       28
        8        8        8        8        0        0        0        0        4        0     7010       28     4517     4586       29
        8        8        8        8        0        0        0        0        4        0     7011       26     4518     4586     4517
-1
/com,*********** Elements for Body 9 "Surface Body" ***********
et,9,181
keyo,9,1,0       ! bending and membrane stiffness
keyo,9,3,2
eblock,19,solid,,7
(19i9)
        9        9        9        9        0        0        0        0        4        0     7012        8     4520        9        9
        9        9        9        9        0        0        0        0        4        0     7013        7     4520        8        8
        9        9        9        9        0        0        0        0        4        0     7014       10     4519       11       11
        9        9        9        9        0        0        0        0        4        0     7015       12     4587        7        7
        9        9        9        9        0        0        0        0        4        0     7016     4519       10        9     4520
        9        9        9        9        0        0        0        0        4        0     7017     4587       12       11     4519
        9        9        9        9        0        0        0        0        4        0     7018        7     4587     4519     4520
-1
/com,*********** Elements for Body 10 "Surface Body" ***********
et,10,181
keyo,10,1,0       ! bending and membrane stiffness
keyo,10,3,2
eblock,19,solid,,7
(19i9)
       10       10       10       10        0        0        0        0        4        0     7019        3        2     4522     4522
       10       10       10       10        0        0        0        0        4        0     7020        6     4588        1        1
       10       10       10       10        0        0        0        0        4        0     7021     4522        2        1        1
       10       10       10       10        0        0        0        0        4        0     7022        4     4521        5        5
       10       10       10       10        0        0        0        0        4        0     7023     4521        4        3     4522
       10       10       10       10        0        0        0        0        4        0     7024     4588        6        5     4521
       10       10       10       10        0        0        0        0        4        0     7025        1     4588     4521     4522
-1
/com,*********** Elements for Body 11 "Surface Body" ***********
et,11,181
keyo,11,1,0       ! bending and membrane stiffness
keyo,11,3,2
eblock,19,solid,,16
(19i9)
       11       11       11       11        0        0        0        0        4        0     7026     3313       16       72       72
       11       11       11       11        0        0        0        0        4        0     7027     3312       17       73       73
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-1
/com,*********** Elements for Body 12 "SkinSurface" ***********
et,12,181
keyo,12,1,0       ! bending and membrane stiffness
keyo,12,3,2
eblock,19,solid,,3067
(19i9)
       12       12       12       12        0        0        0        0        4        0     7042     2078     2052     2295     2295
       12       12       12       12        0        0        0        0        4        0     7043     2060     2061     2056     2056
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-1
/com,*********** Send User Defined Coordinate System(s) ***********
csys,0
toffst,273.15,  ! Temperature offset from absolute zero
/com,*********** Set Reference Temperature ***********
tref,22.
/com,*********** Send Materials ***********
Temperature = 'TEMP' ! Temperature
MP,DENS,1,7850,	! kg m^-3
MP,ALPX,1,1.2e-05,	! C^-1
MP,C,1,434,	! J kg^-1 C^-1
MP,KXX,1,60.5,	! W m^-1 C^-1
MP,RSVX,1,1.7e-07,	! kg m^3 A^-2 s^-3
MP,EX,1,200000000000,	! Pa
MP,NUXY,1,0.3,
MP,MURX,1,10000,

MP,EX,2,72000000000,	! Pa
MP,NUXY,2,0.33,
MP,DENS,2,2810,	! kg m^-3

MP,EX,3,72000000000,	! Pa
MP,NUXY,3,0.33,
MP,DENS,3,2810,	! kg m^-3

MP,EX,4,72000000000,	! Pa
MP,NUXY,4,0.33,
MP,DENS,4,2810,	! kg m^-3

MP,EX,5,72000000000,	! Pa
MP,NUXY,5,0.33,
MP,DENS,5,2810,	! kg m^-3

MP,EX,6,72000000000,	! Pa
MP,NUXY,6,0.33,
MP,DENS,6,2810,	! kg m^-3

MP,EX,7,72000000000,	! Pa
MP,NUXY,7,0.33,
MP,DENS,7,2810,	! kg m^-3

MP,EX,8,72000000000,	! Pa
MP,NUXY,8,0.33,
MP,DENS,8,2810,	! kg m^-3

MP,EX,9,72000000000,	! Pa
MP,NUXY,9,0.33,
MP,DENS,9,2810,	! kg m^-3

MP,EX,10,72000000000,	! Pa
MP,NUXY,10,0.33,
MP,DENS,10,2810,	! kg m^-3

MP,EX,11,72000000000,	! Pa
MP,NUXY,11,0.33,
MP,DENS,11,2810,	! kg m^-3

MP,EX,12,72000000000,	! Pa
MP,NUXY,12,0.33,
MP,DENS,12,2810,	! kg m^-3

/com,*********** Send Sheet Properties ***********
sectype,3,shell
secdata,1.e-003
secoff,mid

sectype,4,shell
secdata,1.e-003
secoff,mid

sectype,5,shell
secdata,1.e-003
secoff,mid

sectype,6,shell
secdata,1.e-003
secoff,mid

sectype,7,shell
secdata,1.e-003
secoff,mid

sectype,8,shell
secdata,1.e-003
secoff,mid

sectype,9,shell
secdata,1.e-003
secoff,mid

sectype,10,shell
secdata,1.e-003
secoff,mid

sectype,11,shell
secdata,1.e-003
secoff,mid

sectype,12,shell
secdata,5.e-004
secoff,mid

sectype,1,shell
secdata,1.e-003
secoff,mid

!************************* Model Summary ********************
!Surface Body,	Structural Steel,	matid,	1
!Solid,	Al7075,	matid,	2
!Surface Body,	Al7075,	matid,	3
!Surface Body,	Al7075,	matid,	4
!Surface Body,	Al7075,	matid,	5
!Surface Body,	Al7075,	matid,	6
!Surface Body,	Al7075,	matid,	7
!Surface Body,	Al7075,	matid,	8
!Surface Body,	Al7075,	matid,	9
!Surface Body,	Al7075,	matid,	10
!Surface Body,	Al7075,	matid,	11
!SkinSurface,	Al7075,	matid,	12
!************************* End Model Summary ********************
/com,*********** Create Contact "Contact Region 8" ***********
*set,tid,14
*set,cid,13
r,tid
r,cid
et,tid,170
et,cid,174
eblock,10,,,28
(15i9)
    10109       14       14       14        0       14       79       70       70
    10110       14       14       14        0       70       79       67       67
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-1
eblock,10,,,28
(15i9)
    10137       13       13       13        0       14       79       70       70
    10138       13       13       13        0       70       79       67       67
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-1
eblock,10,,,16
(15i9)
    10165       13       14       13        0       16     3313       72       72
    10166       13       14       13        0       17     3312       73       73
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-1
eblock,10,,,16
(15i9)
    10181       14       13       14        0       16     3313       72       72
    10182       14       13       14        0       17     3312       73       73
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-1
keyo,cid,8,2               ! auto create asymmetric contact (from Program Controlled setting)
keyo,cid,10,0              ! adjust contact stiffness each NR iteration (from Program Controlled setting)
keyo,cid,12,5              ! bonded always
keyo,cid,18,1              ! small sliding turned on by application
keyo,cid,2,0               ! augmented Lagrange (from Program Controlled setting)
keyo,cid,4,0               ! on Gauss point (from Program Controlled setting)
keyo,cid,9,1               ! ignore initial gaps/penetration
keyo,cid,7,0               ! No Prediction
rmod,tid,3,10.      ! FKN
rmod,tid,5,0.       ! ICONT
rmod,tid,6,-1.31563013864204e-002       ! PINB
rmod,tid,10,0.      ! CNOF
rmod,tid,12,0.      ! FKT
rmod,tid,36,191     ! WB DSID
rmod,cid,3,10.      ! FKN
rmod,cid,5,0.       ! ICONT
rmod,cid,6,-1.31563013864204e-002       ! PINB
rmod,cid,10,0.      ! CNOF
rmod,cid,12,0.      ! FKT
rmod,cid,36,191     ! WB DSID
nsel,all
esel,all
/com,*********** Fixed Supports ***********
CMBLOCK,_FIXEDSU,NODE,       28
(8i10)
        13        14        15        16        17        18        19        20
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cmsel,s,_FIXEDSU
d,all,all
nsel,all
/com,*********** Define Force Using Surface Effect Elements ***********
local,12,0,0.,0.,0.,0.,0.,0.
csys,0
et,15,154
eblock,10,,,3067
(15i9)
    10197       15       15       15       12     3674     3685     3684     3684
    10198       15       15       15       12     3676     3689     3976     3976
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-1
esel,s,type,,15
keyop,15,2,1                ! Apply load in local coordinate system
keyop,15,7,1                ! Use original area so load is constant in large deformation
esel,all
fini
/com,****************************************************************************
/com,*************************    SOLUTION       ********************************
/com,****************************************************************************
/solu
antype,0                   ! static analysis
_thickRatio=  0     ! Ratio of thick parts in the model
eqsl,sparse,,,,,1
cntr,print,1               ! print out contact info and also make no initial contact an error
dmpoption,emat,no             ! Don't combine emat file for DANSYS
dmpoption,esav,no             ! Don't combine esav file for DANSYS
nldiag,cont,iter           ! print out contact info each equilibrium iteration
rescontrol,,none                 ! Do not keep any restart files
/com,****************************************************
/com,******************* SOLVE FOR LS 1 OF 1 ****************
esel,s,type,,15
nsle
sfe,all,1,pres,1,9.02986336515451
sfe,all,2,pres,1,391.294079156696
sfe,all,3,pres,1,0.
nsel,all
esel,all
nsub,1,1,1
time,1.
outres,erase
outres,all,none
outres,nsol,all,
outres,rsol,all
outres,eangl,all
outres,etmp,all
outres,veng,all
outres,strs,all,
outres,epel,all,
outres,eppl,all,
outres,cont,all,
! *********** WB SOLVE COMMAND ***********
! check interactive state
*get,ANSINTER_,active,,int
*if,ANSINTER_,ne,0,then
/eof
*endif
solve
/com *************** Write FE CONNECTORS *********
CEWRITE,file,ce,,INTE
/com,****************************************************
/com,*************** FINISHED SOLVE FOR LS 1 *************
/post1
fini
